*Heading
** Job name: CTS Model name: CTS
** Generated by: Abaqus/CAE 2019
*Preprint, echo=NO, model=NO, history=NO, contact=NO
**
** PARTS
**
*Part, name=Plate
*Node
      1,           0.,           1.
      2,           0.,  0.980000019
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*Element, type=CPE8T, elset=ALL
   1,    1,    2,   53,   52, 2602, 2603, 2604, 2605
   2,    2,    3,   54,   53, 2606, 2607, 2608, 2603
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*Elset, elset=ALL
    1,  2500,     1
*Nset, nset=Load
    1,   52,  103,  154,  205,  256
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*Nset, nset=FixY
 1326, 1377, 1428, 1479, 1530, 1581
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*Nset, nset=COD
 2551,
*Nset, nset=FixX
 2601,
*Solid Section, elset=ALL, material=Mortor
,
*End Part
**
**
** ASSEMBLY
**
*Assembly, name=Assembly
**
*Instance, name=CTS, part=Plate
*End Instance
**
*End Assembly
**
*Material, name=Mortor
*Depvar
    5,
*User Material, constants=4, UNSYMM, TYPE=MECHANICAL
	1e+9,    0.2,	10.0,	0.002
*User Material, type=thermal, constants=2
	0.2,   2e-3
*Density
	1,
**
**BOUNDARY CONDITIONS
*Boundary
CTS.FixX, 1, 1
CTS.FixY, 2, 2
** ----------------------------------------------------------------
**
** STEP: Step-1
**
*STEP,INC=20000,AMPLITUDE=RAMP,NLGEOM,Convert Sdi=No
*COUPLED TEMPERATURE-DISPLACEMENT,DELTMX=100.
5e-4, 1., 1e-5, 5e-4
**
*Boundary
CTS.Load, 2, 2, 0.006
**
** OUTPUT REQUESTS
**
*Restart, write, frequency=0
**
*NODE PRINT, Nset=CTS.COD, FREQ=1
U
*NODE PRINT, Nset=CTS.Load, FREQ=1
RF
*Output, field
*Element Output, directions=YES
SDV,S,E
*Node Output
RF, U, NT
*End Step
