*Heading
** Job name: CTS-3D Model name: Model-1
** Generated by: Abaqus/CAE 2019
*Preprint, echo=NO, model=NO, history=NO, contact=NO
**
** PARTS
**
*Part, name=Part-1
*Node
      1,           0.,           0., 0.0199999996
      2,           0.,           0.,           0.
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*Element, type=C3D20T
   1,   103,   104,   106,   105,     1,     2,     4,     3,  5206,  5205,  5204,  5203,  5207,  5208,  5209,
       5210,  5212,  5211,  5213,  5214
   2,   105,   106,   108,   107,     3,     4,     6,     5,  5204,  5217,  5216,  5215,  5209,  5218,  5219,
       5220,  5214,  5213,  5221,  5222
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*Nset, nset=Set-1, generate
     1,  18003,      1
*Elset, elset=Set-1, generate
    1,  2500,     1
** Section: Section-1
*Solid Section, elset=Set-1, material=Material-1
,
*End Part
**
**
** ASSEMBLY
**
*Assembly, name=Assembly
**
*Instance, name=Part-1-1, part=Part-1
*End Instance
**
*Nset, nset=FixX, instance=Part-1-1
  101,  102, 5603
*Elset, elset=FixX, instance=Part-1-1
 50,
*Nset, nset=FixY, instance=Part-1-1
   51,   52,   53,   54,   55,   56
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*Elset, elset=FixY, instance=Part-1-1, generate
 26,  50,   1
*Nset, nset=FixZ, instance=Part-1-1
     2,     4,     6,     8,    10,    12
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*Elset, elset=FixZ, instance=Part-1-1, generate
    1,  2500,     1
*Nset, nset=Load, instance=Part-1-1
  5101,  5102,  5103,  5104,  5105,  5106
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*Elset, elset=Load, instance=Part-1-1, generate
 2451,  2500,     1
*End Assembly
**
** MATERIALS
**
*Material, name=Material-1
*Depvar
    5,
*User Material, constants=4,UNSYMM,TYPE=MECHANICAL
	1e+9,    0.2,	10.0,	0.002
*User Material, type=thermal, constants=2
	0.2,   2e-3
*density
	1,
** ----------------------------------------------------------------
**
** STEP: Step-1
**
*STEP,INC=20000,AMPLITUDE=RAMP,NLGEOM,Convert Sdi=No
*COUPLED TEMPERATURE-DISPLACEMENT,DELTMX=100.
5e-4, 1., 1e-5, 5e-4
**
** BOUNDARY CONDITIONS
**
** Name: BC-1 Type: Displacement/Rotation
*Boundary
Load, 2, 2, 0.006
** Name: BC-2 Type: Displacement/Rotation
*Boundary
FixZ, 3, 3
** Name: BC-3 Type: Displacement/Rotation
*Boundary
FixY, 2, 2
** Name: BC-4 Type: Displacement/Rotation
*Boundary
FixX, 1, 1
**
** OUTPUT REQUESTS
**
*Restart, write, frequency=0
**
*NODE PRINT, Nset=Load, FREQ=1
RF
*Output, field
*Element Output, directions=YES
SDV,S,E
*Node Output
RF, U, NT
*End Step
